# Berechnung der absoluten Feuchte
# Eingangsparameter / physikalische Größen
# Gaskonstante Wasserdampf
R_D := 461.51*J/(K*kg)
# Gaskonstante trockene Luft
R_tL := 287.058*J/(K*kg)
# Eingabeparameter / Messgrößen
# Umgebungsdruck
p_U := 101325*Pa
# Messgrößen
# Raumtemperatur
T_R := 20 °C
# relative Feuchte (in Prozent)
φ_R := 50%
φ_R = 0.5
# Berechnungen
# Dichte trockene Luft
ρ_tL := p_U/(R_tL*T_R) = 1.20408 kg/m^3
# Sättigungsdruck
E_R := 6.112*10^2 Pa*e^(17.62*(T_R - 273.15 K)/(243.12*K + (T_R - 273.15 K)))
# Partialdruck
e_R := φ_R*E_R = 1166.3 Pa
# absolute Feuchte
ρ_R := e_R/(R_D*T_R) = 8.62062 gm/m^3
# Gaskonstante feuchte Luft
R_tF := R_tL/(1 - (φ_R*E_R/p_U)*(1 - R_tL/R_D)) = 288.312 J/(kg*K)
# Dichte feuchte Luft
ρ_tL := p_U/(R_tF*T_R) = 1.19885 kg/m^3
# Vereinfachungen für die Berechnung auf dem ESP
# Messgrößen
# Raumtemperatur in Grad Celsius
T_R := 20
# relative Feuchte (in Prozent)
φ_R := 80%
φ_R = 0.8
# absolute Feuchtigkeit in kg/Kubikmeter (Größengleichung)
ρ == φ_R*6.112*10^2 Pa*e^(17.62*(T_R - 273.15*K)/(243.12*K + (T_R - 273.15*K)))/(461.51*J/(K*kg)*T_R)
ρ := φ_R*1.32434833481*e^(17.62*T_R/(T_R + 243.12))/(T_R + 273.15) = 0.013793
# absolute Feuchte in g/Kubikmeter (Größengleichung)
ρ := φ_R*1324.34*e^(17.62*T_R/(T_R + 243.15))/(T_R + 273.15) = 13.7908
# Berechnung von Schaltschwellen
# Genauigkeit des AM2302
# Temperatur: +/- 0.5 °C
# rel. Feuchte: +/- 2%
# minimale Schalttemperatur (außen) in °C
T_R := 10
# Differenz der relativen Luftfeuchtigkeiten
Δφ_R := 5%
# Änderung der absoluten Feuchte in g/m³
# dynamische Schaltschwelle
Δρ_d := 1324.34*Δφ_R*e^(0.0696*T_R)/(T_R + 273.15) = 0.469053
